*HEADING
Makeup
**
** Connector Parameters
**
** Outside diameter (in)  : 2.875000
** Wall thickness (in)    : 0.308000
** Yield stress (ksi)     : 95.000000
** Tensile strength (ksi) : 110.000000
** Tensile rating	        : 1.000000
** Compressive rating     : 1.000000
**
*preprint,model=yes,history=yes
*Node
       1, 1.246880054E+00,-1.925568461E+00, 0.000000000E+00
       2, 1.247121811E+00,-1.926538229E+00, 0.000000000E+00
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*element,type=cax4,elset=axi
1,1,2,262,261
2,2,3,263,262
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*element,type=cax3,elset=axi
18569,3160,3322,21971
25726,30153,30159,30195
*elset,elset=pin
1243,
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*elset,elset=box
1,
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*solid section,elset=box,material=T95
1.0
*solid section,elset=pin,material=T95
1.0
*include,input=materials.inp
*material, name=T95
*elastic
10, .3
*density
5
*expansion
1
***********************************
**** Seal definition
***********************************
***********************************
**** seals01_inner
***********************************
*surface,name=seals01_inner
1487,S4
1488,S4
1489,S4
1490,S4
1491,S4
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16393,S4
***********************************
**** sealm01_inner
***********************************
*surface,name=sealm01_inner
235,S1
234,S1
233,S1
232,S1
231,S1
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7,S1
*contact pair,interaction=seal01_inner
seals01_inner,sealm01_inner
*surface interaction,name=seal01_inner
*friction
0.0,
***********************************
**** seals02_outer
***********************************
*surface,name=seals02_outer
25863,S4
25862,S4
25861,S4
25860,S4
26342,S4
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6806,S2
***********************************
**** sealm02_outer
***********************************
*surface,name=sealm02_outer
4501,S4
4500,S4
4499,S4
4498,S4
4497,S4
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18631,S4
*contact pair,interaction=seal02_outer
seals02_outer,sealm02_outer
*surface interaction,name=seal02_outer
*friction
0.0,
***********************************
**** Thread definition
***********************************
***********************************
**** ts01
***********************************
*surface,name=ts01
5676,S2
5665,S4
5665,S3
5663,S4
5662,S4
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4640,S4
***********************************
**** tm01
***********************************
*surface,name=tm01
2444,S4
2443,S4
2442,S4
2441,S4
2440,S4
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3373,S4
*contact pair,interaction=t01
ts01,tm01
*surface interaction,name=t01
*friction
0.0,
***********************************
**** ts02
***********************************
*surface,name=ts02
6809,S2
6807,S3
6843,S2
6805,S4
6805,S3
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5744,S4
***********************************
**** tm02
***********************************
*surface,name=tm02
3517,S4
3519,S3
3516,S4
3525,S2
3515,S4
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4496,S4
*contact pair,interaction=t02
ts02,tm02
*surface interaction,name=t02
*friction
0.0,
***********************************
**** Torque shoulder definition
***********************************
***********************************
**** tss01_inner
***********************************
*surface,name=tss01_inner
16703,S4
16702,S4
16694,S4
1250,S1
1249,S1
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1468,S4
***********************************
**** tsm01_inner
***********************************
*surface,name=tsm01_inner
21518,S4
21519,S4
21520,S4
21521,S4
21522,S4
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22047,S4
*contact pair,interaction=ts01_inner
tss01_inner,tsm01_inner
*surface interaction,name=ts01_inner
*friction
0.0,
***********************************
**** tss02_middle
***********************************
*surface,name=tss02_middle
15818,S4
1807,S4
1808,S4
1809,S4
1810,S4
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15716,S4
***********************************
**** tsm02_middle
***********************************
*surface,name=tsm02_middle
24690,S4
24689,S4
24688,S4
24687,S4
24668,S4
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24564,S4
*contact pair,interaction=ts02_middle
tss02_middle,tsm02_middle
*surface interaction,name=ts02_middle
*friction
0.0,
*amplitude,name=HoldOpen
0.0,1.0,1.0,1.0
*amplitude,name=Close
0.0,1.0,1.0,0.0
*step,inc=100,nlgeom,name=mmxmn_1
Resolution of thread contact with pin and box axially restrained
*static
0.005,1.0
*restart,write,freq=999
*nset,nset=box
15877,
15946,
16015,
16084,
16153,
16222,
*nset,nset=pin
24939,
24898,
24857,
24816,
24775,
24734,
24693,
*boundary,op=new
15877,2,2,0.0
15946,2,2,0.0
16015,2,2,0.0
16084,2,2,0.0
16153,2,2,0.0
16222,2,2,0.0
24939,2,2,0.0
24898,2,2,0.0
24857,2,2,0.0
24816,2,2,0.0
24775,2,2,0.0
24734,2,2,0.0
24693,2,2,0.0
*model change,activate
*contact interference,type=contact pair,amplitude=HoldOpen
seals02_outer, sealm02_outer, 0.002
seals01_inner, sealm01_inner, 0.00823698217028
tss01_inner, tsm01_inner, 0.0219248828785
tss02_middle, tsm02_middle, 0.00877044271361
*contact interference,type=contact pair,shrink
ts02, tm02
*contact interference,type=contact pair,shrink
ts01, tm01
***********************************
****
**** SPECIFICATION OF INFORMATION TO BE PRINTED
****
***********************************
****
*PRINT,CONTACT=YES,RESIDUAL=YES
*ENERGY PRINT
*TORQUE PRINT,FREQ=999
*CONTACT PRINT,FREQ=999,SLAVE=seals02_outer
*CONTACT PRINT,FREQ=999,SLAVE=seals01_inner
***********************************
*EL PRINT,FREQ=0
*NODE PRINT,FREQ=99999,NSET=Pin,TOTALS=YES, SUMMARY=NO
U,RF
*NODE PRINT,FREQ=99999,NSET=Box,TOTALS=YES, SUMMARY=NO
U,RF
****
***********************************
****
**** SPECIFICATION OF INFORMATION TO BE FILED
****
***********************************
****
*CONTACT FILE,FREQ=999
*EL FILE,FREQ=999,ELSET=axi
LE,S,PE
*NODE FILE,FREQ=999
U,
***********************************
****
**** Output to the odb
****
***********************************
*output,field,freq=999
*node output
U,
*element output
LE,PEMAG,S,PE
*contact output
cstress,
cdisp,
ppress,
*END STEP
*step,inc=100,nlgeom,name=mmxmn_2
Resolution of seal contact with pin and box axially restrained
*static
0.005,1.0
*contact interference,type=contact pair,amplitude=Close
seals02_outer, sealm02_outer, 0.002
seals01_inner, sealm01_inner, 0.00823698217028
*contact interference,type=contact pair,amplitude=HoldOpen
tss01_inner, tsm01_inner, 0.0219248828785
tss02_middle, tsm02_middle, 0.00877044271361
***********************************
****
**** SPECIFICATION OF INFORMATION TO BE PRINTED
****
***********************************
****
*PRINT,CONTACT=YES,RESIDUAL=YES
*ENERGY PRINT
*TORQUE PRINT,FREQ=999
*CONTACT PRINT,FREQ=999,SLAVE=seals02_outer
*CONTACT PRINT,FREQ=999,SLAVE=seals01_inner
***********************************
*EL PRINT,FREQ=0
*NODE PRINT,FREQ=99999,NSET=Pin,TOTALS=YES, SUMMARY=NO
U,RF
*NODE PRINT,FREQ=99999,NSET=Box,TOTALS=YES, SUMMARY=NO
U,RF
****
***********************************
****
**** SPECIFICATION OF INFORMATION TO BE FILED
****
***********************************
****
*CONTACT FILE,FREQ=999
*EL FILE,FREQ=999,ELSET=axi
LE,S,PE
*NODE FILE,FREQ=999
U,
***********************************
****
**** Output to the odb
****
***********************************
*output,field,freq=999
*node output
U,
*element output
LE,PEMAG,S,PE
*contact output
cstress,
cdisp,
ppress,
*END STEP
*step,inc=100,nlgeom,name=mmxmn_3
Resolution of torque shoulder contact with pin and box axially restrained
*static
0.005,1.0
*contact interference,type=contact pair,amplitude=Close
tss01_inner, tsm01_inner, 0.0219248828785
tss02_middle, tsm02_middle, 0.00877044271361
***********************************
****
**** SPECIFICATION OF INFORMATION TO BE PRINTED
****
***********************************
****
*PRINT,CONTACT=YES,RESIDUAL=YES
*ENERGY PRINT
*TORQUE PRINT,FREQ=999
*CONTACT PRINT,FREQ=999,SLAVE=seals02_outer
*CONTACT PRINT,FREQ=999,SLAVE=seals01_inner
***********************************
*EL PRINT,FREQ=0
*NODE PRINT,FREQ=99999,NSET=Pin,TOTALS=YES, SUMMARY=NO
U,RF
*NODE PRINT,FREQ=99999,NSET=Box,TOTALS=YES, SUMMARY=NO
U,RF
****
***********************************
****
**** SPECIFICATION OF INFORMATION TO BE FILED
****
***********************************
****
*CONTACT FILE,FREQ=999
*EL FILE,FREQ=999,ELSET=axi
LE,S,PE
*NODE FILE,FREQ=999
U,
***********************************
****
**** Output to the odb
****
***********************************
*output,field,freq=999
*node output
U,
*element output
LE,PEMAG,S,PE
*contact output
cstress,
cdisp,
ppress,
*END STEP
*step,inc=100,nlgeom,name=mmxmn_4
Resolution of contact with box axially restrained
*static
1.0,1.0
*boundary,op=new
15877,2,2,0.0
15946,2,2,0.0
16015,2,2,0.0
16084,2,2,0.0
16153,2,2,0.0
16222,2,2,0.0
*output,field,freq=999
*node output
U,
*element output
LE,PEMAG,S,PE
*contact output
cstress,
cdisp,
ppress,
*end step
